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R := READ_RED("..\Pictures\с.bmp")
G := READ_GREEN("..\Pictures\с.bmp")
B := READ_BLUE("..\Pictures\с.bmp")
X := rows(R)
Y := cols(R)
Δ :=
    for i ∈ 0 .. 510
        Δ[i] ← i - 255
    Δ
b :=
    i ← 0
    for y ∈ 0 .. Y - 1
        c ← R[:, y]
        b[i] ← 0
        for x ∈ 0 .. X - 1
            b[i] ← b[i] xor mod(c[x], 2)
            if mod(x, 3) == 0
                b[i] ← b[i] or 1
        i ← i + 1
    b ← stack(b, b, b, b)
b = [
    0; 0; 0; 0; 0; 0; 0; 0; 0; 0
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]
B2D(x) := sum(x[i]*2^i, i = 0 .. 7)
D2B(x) :=
    for i ∈ 0 .. 7
        V[i] ← mod(x, 2)
        x ← floor(x/2)
    V
K := 8
step(x) := K*sum(x[i], i = 0 .. rows(x) - 1)
Δ = [
    -255; -254; -253; -252; -251; -250; -249; -248; -247; -246
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]
μs := 104
M := "(C) Sukhov"
Lm := strlen(M)*8 = 80
μe := "KeHeu,6"
Me := str2vec(concat(M, μe))
Cv :=
    Cv ← B[:, 0]
    for i ∈ 1 .. cols(B) - 1
        Cv ← stack(Cv, B[:, i])
Sv :=
    Sv ← Cv
    Mvec ← str2vec(M)
    Mvecbin ← D2B(Mvec[0])
    for j ∈ 1 .. rows(Mvec) - 1
        Mvecbin ← stack(Mvecbin, D2B(Mvec[j]))
    z ← μs
    for μ ∈ 0 .. Lm - 1
        z ← z + step(D2B(z))
        Δt ← Cv[z] - Cv[z - 1]
        for i ∈ 0 .. rows(Δ) - 1
            if Δt == Δ[i]
                J ← i
                break
        if b[J] ≠ Mvecbin[μ]
            for σ ∈ 0 .. rows(Δ) - 2
                JL ← -1000
                if J - σ ≥ 0
                    if b[J - σ] == Mvecbin[μ]
                        JL ← J - σ
                        break
            for σ ∈ 0 .. rows(Δ) - 2
                JH ← 1000
                if J + σ ≤ rows(Δ) - 1
                    if b[J + σ] == Mvecbin[μ]
                        JH ← J + σ
                        break
            if J - JL < JH - J
                if 0 ≤ (Sv[z - 1] + Δ[JL]) ≤ 255
                    Sv[z] ← Sv[z - 1] + Δ[JL]
                else
                    Sv[z] ← Sv[z] - Δ[JL]
            if J - JL ≥ JH - J + 5000
                if 0 ≤ Sv[z - 1] + Δ[JH] ≤ 255
                    Sv[z] ← Sv[z - 1] + Δ[JH]
                else
                    Sv[z] ← Sv[z] - Δ[JH]
    Sv
rows(G) = 200
Ss :=
    for i ∈ 0 .. cols(G) - 1
        St[:, i] ← submatrix(Sv, i*rows(G), i*rows(G) + rows(G) - 1, 0, 0)
    St
Final := augment(R, G, Ss)
WRITERGB("out.bmp", Final) = 0
Mess :=
    z ← μs
    for μ ∈ 0 .. rows(Sv) - 1
        z ← z + step(D2B(z))
        if z ≤ rows(Sv) - 1
            Δst ← Sv[z] - Sv[z - 1]
        if z > rows(Sv) - 1
            break
        for i ∈ 0 .. rows(Δ) - 1
            if Δst == Δ[i]
                J ← i
                break
        Mess[μ] ← b[J]
    for j ∈ 0 .. rows(Mess)/8 - 1
        Mvec[j] ← B2D(submatrix(Mess, 8*j, 8*j + 7, 0, 0))
    vec2str(submatrix(Mvec, 0, 30, 0, 0))  # error: Невозможно вычислить строку, поскольку в ней содержится ошибочный символ.
